// SBML level 2 version 1

model MorrisonAllegra()
  // Morrison1989_FolateCycle
  // biomodels.db:MODEL6617317313
  // biomodels.db:BIOMD0000000018
  // isDescribedBy pubmed:2732237
  // occursIn taxonomy:9606
  // icd:C50
  // hasPart kegg.pathway:map00670 kegg.pathway:map00790

  // Compartments:
  compartment cell = 1;
  compartment ext = 1;

  // Species:
  species AICAR in cell = 3.695;  // CHEBI:18406 kegg.compound:C04677
  species $ATP in cell = 2980;  // CHEBI:15422 kegg.compound:C00002
  species CH2FH4 in cell = 0.26; CH2FH4 is "5,10-methylene-tetrahydrofolate";  // CHEBI:15636 kegg.compound:C00143
  species CH3FH4 in cell = 1.63; CH3FH4 is "5-methyl-tetrahydrofolate";  // CHEBI:15641 kegg.compound:C00440
  species CHOFH4 in cell = 1; CHOFH4 is "10-formyl-tetrahydrofolate";  // CHEBI:15637 kegg.compound:C00234
  species DHFRf in cell = 0.64; DHFRf is "dihydrofolate reductase free";  // uniprot:P00374
  species $DHFRtot in cell = 0.64; DHFRtot is "dihydrofolate reductase total";  // uniprot:P00374
  species $dUMP in cell = 20.76;  // CHEBI:17622 kegg.compound:C00365
  species $EMTX in ext = 0;  // kegg.compound:C01937
  species FFH2 in cell = 0.000332; FFH2 is "10-formyl-dihydrofolate";  // CHEBI:15634 kegg.compound:C03204
  species FGAR in cell = 16.49;  // kegg.compound:C04376
  species $FH2b in cell = 0.0024; FH2b is "dihydrofolate bound";  // isVersionOf CHEBI:15633 kegg.compound:C00415
  species FH2f in cell = 0.0012; FH2f is "dihydrofolate free";  // isVersionOf CHEBI:15633 kegg.compound:C00415
  species FH4 in cell = 0.46; FH4 is "tetrahydrofolate";  // CHEBI:20506 kegg.compound:C00101
  species $formate in cell = 500;  // CHEBI:15740 kegg.compound:C00058
  species $GAR in cell = 689.6;  // kegg.compound:C03838
  species $glutamine in cell = 7170;  // CHEBI:18050 kegg.compound:C00064
  species $glycine in cell = 1600;  // CHEBI:15428 kegg.compound:C00037
  species HCHO in cell = 0.0074;  // CHEBI:16842 kegg.compound:C00067
  species $homocysteine in cell = 10;  // CHEBI:17230 kegg.compound:C05330
  species MTX1 in cell = 0;  // kegg.compound:C01937
  species MTX1b in cell = 0;  // kegg.compound:C01937
  species MTX2 in cell = 0;  // kegg.compound:C01937
  species MTX2b in cell = 0;  // kegg.compound:C01937
  species MTX3 in cell = 0;  // kegg.compound:C01937
  species MTX3b in cell = 0;  // kegg.compound:C01937
  species MTX4 in cell = 0;  // kegg.compound:C01937
  species MTX4b in cell = 0;  // kegg.compound:C01937
  species MTX5 in cell = 0;  // kegg.compound:C01937
  species MTX5b in cell = 0;  // kegg.compound:C01937
  species $NADP in cell = 6.73;  // CHEBI:18009 kegg.compound:C00006
  species $NADPH in cell = 294;  // CHEBI:16474 kegg.compound:C00005
  species $serine in cell = 123.3;  // CHEBI:17115 kegg.compound:C00065

  // Parameters:
  Keq = 0.32;

  // Assignment rules:
  // (no variable named) := FH2f*DHFRf/Keq;
  // (no variable named) := FH2b + DHFRf + MTX1b + MTX2b + MTX3b + MTX4b + MTX5b;

  // Reactions:
  AICARsyn: FGAR => AICAR; cell*Vm*glutamine/Km1/(1 + glutamine/Km1)*FGAR/Km2/(1 + FGAR/Km2);  // modifiers: glutamine; isVersionOf ec-code:6.3.5.3
  ATIC12: AICAR + FFH2 => FH2f; cell*Vm*FFH2*AICAR/(AICAR*FFH2 + FFH2*Km2 + (AICAR + Km2)*Km1*(1 + MTX1/Ki21 + MTX2/Ki22 + MTX3/Ki23 + MTX4/Ki24 + MTX5/Ki25 + FH2f/Ki1 + FFH2/Ki1f));  // modifiers: MTX1, MTX2, MTX3, MTX4, MTX5; isVersionOf ec-code:2.1.2.3; kegg.reaction:R04560
  ATIC7: AICAR + CHOFH4 => FH4; cell*Vm*CHOFH4*AICAR/(AICAR*CHOFH4 + CHOFH4*Km2 + (AICAR + Km2)*Km1*(1 + MTX1/Ki21 + MTX2/Ki22 + MTX3/Ki23 + MTX4/Ki24 + MTX5/Ki25 + FH2f/Ki1 + FFH2/Ki1f));  // modifiers: FFH2, FH2f, MTX1, MTX2, MTX3, MTX4, MTX5; kegg.reaction:R04560 reactome:REACT_812; isVersionOf ec-code:2.1.2.3
  CH2FH4toHCHO: CH2FH4 => FH4 + HCHO; cell*hl*CH2FH4;
  DHFRdeg: DHFRf => ; Vm*cell*(DHFRf + FH2b);  // modifiers: FH2b
  DHFReductase: FH2f => FH4; cell*kter*FH2b;  // modifiers: FH2b; kegg.reaction:R00939; isVersionOf ec-code:1.5.1.3
  DHFRfsyn: => DHFRf; cell*(k0 + k1*EMTX);  // modifiers: EMTX
  FFH2syn: FH2f => FFH2; cell*Vm*FH2f;  // kegg.reaction:R02238; isVersionOf ec-code:6.3.4.17
  FH2bdeg: => FH2f; cell*Vm*FH2b;  // modifiers: FH2b
  FPGS12: MTX1 => MTX2; cell*Vm*MTX1;  // isVersionOf ec-code:6.3.2.17
  FPGS23: MTX2 => MTX3; cell*Vm*MTX2;  // isVersionOf ec-code:6.3.2.17
  FPGS34: MTX3 => MTX4; cell*Vm*MTX3;  // isVersionOf ec-code:6.3.2.17
  FPGS45: MTX4 => MTX5; cell*Vm*MTX4;  // isVersionOf ec-code:6.3.2.17
  GARFT: CHOFH4 + $GAR => FGAR + FH4; cell*Vm*CHOFH4*GAR/(GAR*CHOFH4 + CHOFH4*Km2 + (GAR + Km2)*Km1*(1 + MTX1/Ki21 + MTX2/Ki22 + MTX3/Ki23 + MTX4/Ki24 + MTX5/Ki25 + FH2f/Ki1 + FFH2/Ki1f));  // modifiers: FFH2, FH2f, MTX1, MTX2, MTX3, MTX4, MTX5; kegg.reaction:R04325 reactome:REACT_1509; isVersionOf ec-code:2.1.2.2
  GGH21: MTX2 => MTX1; cell*Vm*MTX2;  // isVersionOf ec-code:3.4.19.9
  GGH32: MTX3 => MTX2; cell*Vm*MTX3;  // isVersionOf ec-code:3.4.19.9
  GGH43: MTX4 => MTX3; cell*Vm*MTX4;  // ec-code:3.4.19.9
  GGH54: MTX5 => MTX4; cell*Vm*MTX5;  // ec-code:3.4.19.9
  HCHOtoCH2FH4: FH4 + HCHO => CH2FH4; cell*hp*FH4*HCHO;
  HCOOHtoCHOFH4: $ATP + FH4 + $formate => CHOFH4; cell*Vm/((1 + Km1/FH4)*(1 + Km2/ATP)*(1 + Km3/formate));  // kegg.reaction:R00943; isVersionOf ec-code:6.3.4.3
  MTHFD: CH2FH4 + $NADP => CHOFH4; cell*Vm*CH2FH4/Km1/(1 + CH2FH4/Km1)*NADP/Km2/(1 + NADP/Km2);  // hasPart ec-code:1.5.1.5 ec-code:6.3.4.3 kegg.reaction:R01220 kegg.reaction:R01655
  MTHFR: CH2FH4 + $NADPH => CH3FH4; cell*Vm*CH2FH4*NADPH/(NADPH*CH2FH4 + CH2FH4*Km2 + (NADPH + Km2)*Km1*(1 + MTX1/Ki21 + MTX2/Ki22 + MTX3/Ki23 + MTX4/Ki24 + MTX5/Ki25 + FH2f/Ki1));  // modifiers: FH2f, MTX1, MTX2, MTX3, MTX4, MTX5; kegg.reaction:R01224; isVersionOf ec-code:1.5.1.20
  MTR: CH3FH4 + $homocysteine => FH4; cell*Vm*homocysteine/Km2/(1 + homocysteine/Km2)*CH3FH4/Km1/(1 + CH3FH4/Km1);  // kegg.reaction:R00946; isVersionOf ec-code:2.1.1.13
  MTX1deg: MTX1b => MTX1; cell*Vm*MTX1b;
  MTX1export: MTX1 => ; cell*Vm*MTX1;  // GO:0008517
  MTX1off: MTX1b => DHFRf + MTX1; cell*Vm*MTX1b;
  MTX1on: DHFRf + MTX1 => MTX1b; cell*Vm*DHFRf*MTX1;
  MTX2deg: MTX2b => MTX2; cell*Vm*MTX2b;
  MTX2export: MTX2 => ; cell*Vm*MTX2;  // GO:0008517
  MTX2off: MTX2b => DHFRf + MTX2; cell*Vm*MTX2b;
  MTX2on: DHFRf + MTX2 => MTX2b; cell*Vm*DHFRf*MTX2;
  MTX3deg: MTX3b => MTX3; cell*Vm*MTX3b;
  MTX3export: MTX3 => ; cell*Vm*MTX3;  // GO:0008517
  MTX3off: MTX3b => DHFRf + MTX3; cell*Vm*MTX3b;
  MTX3on: DHFRf + MTX3 => MTX3b; cell*Vm*DHFRf*MTX3;
  MTX4deg: MTX4b => MTX4; cell*Vm*MTX4b;
  MTX4export: MTX4 => ; cell*Vm*MTX4;  // isVersionOf GO:0008517
  MTX4off: MTX4b => DHFRf + MTX4; cell*Vm*MTX4b;
  MTX4on: DHFRf + MTX4 => MTX4b; cell*Vm*DHFRf*MTX4;
  MTX5deg: MTX5b => MTX5; cell*Vm*MTX5b;
  MTX5export: MTX5 => ; cell*Vm*MTX5;  // isVersionOf GO:0008517
  MTX5off: MTX5b => DHFRf + MTX5; cell*Vm*MTX5b;
  MTX5on: DHFRf + MTX5 => MTX5b; cell*Vm*DHFRf*MTX5;
  RFC: $EMTX => MTX1; ext*Vm*EMTX/(Km + EMTX);  // GO:0008517
  SHMT: FH4 + $serine => CH2FH4; cell*Vm*serine/Km2/(1 + serine/Km2)*FH4/Km1/(1 + FH4/Km1);  // kegg.reaction:R00945; isVersionOf ec-code:2.1.2.1
  SHMTr: CH2FH4 => FH4; cell*Vm*glycine/Km2/(1 + glycine/Km2)*CH2FH4/Km1/(1 + CH2FH4/Km1);  // modifiers: glycine; kegg.reaction:R00945; isVersionOf ec-code:2.1.2.1
  TYMS: CH2FH4 + $dUMP => FH2f; cell*Vm*CH2FH4*dUMP/(dUMP*CH2FH4*(1 + MTX1/Ki21 + MTX2/Ki22 + MTX3/Ki23 + MTX4/Ki24 + MTX5/Ki25 + FH2f/Ki1) + Km1*dUMP*(FFH2/Ki1f*MTX1/Ki21 + (1 + FFH2/Ki1f)*(1 + MTX2/Ki22 + MTX3/Ki23 + MTX4/Ki24 + MTX5/Ki25 + FH2f/Ki1)) + Km1*Km2*(1 + MTX2/Ki22 + MTX3/Ki23 + MTX4/Ki24 + MTX5/Ki25 + FH2f/Ki1));  // modifiers: FFH2, MTX1, MTX2, MTX3, MTX4, MTX5; kegg.reaction:R02101; isVersionOf ec-code:2.1.1.45

  // Unit definitions:
  unit substance = 1e-6 mole; substance is "micromole (new default)";
  unit time = 3600 second; time is "heure (new default)";
end
